Ararinha Lc_h=4.8237 CG fwd
0.8500          # Mach
0 0 0.0       # iYsym iZsym Zsym
368.8330 6.8995 60.1518   # Sref Cref Bref
26.0805 0.0 0.0   # Xref Yref Zref
0.01468       # CDp
#----------------------------------------------------------------
SURFACE
Wing
#Nchordwise Cspace Nspanwise Sspace
8 1.0 60 1.0
YDUPLICATE
0.0
ANGLE
0.0

SECTION
#Xle      Yle      Zle      Chord    Ainc
15.9966  0.0000  -2.5000  9.8898  0.0000
AFILE
airfoils/raiz.dat
CLAF
1.0000

SECTION
#Xle      Yle      Zle      Chord    Ainc
18.2882  3.0407  -2.1804  9.1299  3.0000
AFILE
airfoils/raiz.dat
CLAF
1.0000

SECTION
#Xle      Yle      Zle      Chord    Ainc
20.9833  6.6167  -1.8046  8.2363  1.1263
AFILE
airfoils/gerado/eta_0220.dat
CLAF
1.0000

SECTION
#Xle      Yle      Zle      Chord    Ainc
23.2500  9.6243  -1.4884  7.4846  -0.2582
AFILE
airfoils/gerado/eta_0320.dat
CLAF
1.0000

SECTION
#Xle      Yle      Zle      Chord    Ainc
25.0180  11.9702  -1.2419  6.8984  0.9353
AFILE
airfoils/gerado/eta_0398.dat
CLAF
1.0000

SECTION
#Xle      Yle      Zle      Chord    Ainc
26.8767  14.4364  -0.9827  6.2820  3.0000
AFILE
airfoils/gerado/eta_0480.dat
CLAF
1.0000

SECTION
#Xle      Yle      Zle      Chord    Ainc
28.6900  16.8425  -0.7298  5.6807  -3.3188
AFILE
airfoils/gerado/eta_0560.dat
CLAF
1.0000
CONTROL
aileron  1.0   0.73    0. 0. 0.    -1.0

SECTION
#Xle      Yle      Zle      Chord    Ainc
31.8634  21.0531  -0.2872  4.6284  -3.2764
AFILE
airfoils/gerado/eta_0700.dat
CLAF
1.0000
CONTROL
aileron  1.0   0.73    0. 0. 0.    -1.0

SECTION
#Xle      Yle      Zle      Chord    Ainc
34.5834  24.6623  0.0921  3.7265  -5.0187
AFILE
airfoils/gerado/eta_0820.dat
CLAF
1.0000
CONTROL
aileron  1.0   0.73    0. 0. 0.    -1.0

SECTION
#Xle      Yle      Zle      Chord    Ainc
36.3968  27.0683  0.3450  3.1252  -4.6546
AFILE
airfoils/ponta.dat
CLAF
1.0000
CONTROL
aileron  1.0   0.73    0. 0. 0.    -1.0

SECTION
#Xle      Yle      Zle      Chord    Ainc
38.6635  30.0759  0.6611  2.3736  -3.7486
AFILE
airfoils/ponta.dat
CLAF
1.0000
#----------------------------------------------------------------
SURFACE
Winglet
#Nchordwise Cspace Nspanwise Sspace
8 1.0 4 1.0
COMPONENT
1
YDUPLICATE
0.0
ANGLE
0.0

SECTION
#Xle      Yle      Zle      Chord    Ainc
38.6635  30.0759  0.6611  2.3736  0.0000
AFILE
airfoils/ponta.dat
CLAF
1.0000

SECTION
#Xle      Yle      Zle      Chord    Ainc
40.5386  30.0759  3.0347  0.4984  0.0000
AFILE
airfoils/ponta.dat
CLAF
1.0000
#----------------------------------------------------------------
SURFACE
Horizontal tail
#Nchordwise Cspace Nspanwise Sspace
8 1.0 20 1.0
YDUPLICATE
0.0
ANGLE
0.0

SECTION
#Xle      Yle      Zle      Chord    Ainc
56.1848  0.0000  3.8500  4.7050  0.0000
NACA
0010
CLAF
1.0000
DESIGN
it      1.0
CONTROL
elevator 1.0   0.70    0. 0. 0.     1.0

SECTION
#Xle      Yle      Zle      Chord    Ainc
62.9206  7.8455  4.1240  2.1172  0.0000
NACA
0010
CLAF
1.0000
DESIGN
it      1.0
CONTROL
elevator 1.0   0.70    0. 0. 0.     1.0
#----------------------------------------------------------------
SURFACE
Vertical tail
#Nchordwise Cspace Nspanwise Sspace
8 1.0 6 1.0
ANGLE
0.0

SECTION
#Xle      Yle      Zle      Chord    Ainc
51.9366  0.0000  4.8500  9.1453  0.0000
NACA
0010
CLAF
1.0000
CONTROL
rudder   1.0   0.70    0. 0. 0.     0.0

SECTION
#Xle      Yle      Zle      Chord    Ainc
60.7610  0.0000  14.4525  3.6581  0.0000
NACA
0010
CLAF
1.0000
CONTROL
rudder   1.0   0.70    0. 0. 0.     0.0
#----------------------------------------------------------------
BODY
Fuselage
# Nbody Bspace
80 1.0
SCALE
61.3900 6.0800 6.0800
BFILE
fuselage_reamostrada.dat
#----------------------------------------------------------------
SURFACE
Nacelle
#Nchordwise  Cspace   Nspanwise  Sspace
6            1.0      12          0.0
COMPONENT
2
YDUPLICATE
0.0
SCALE
7.3000  2.0000  2.0000
TRANSLATE
18.0000  11.0000  -4.2000

SECTION
#Xle   Yle    Zle      Chord   Ainc  Nspanwise  Sspace
 0.00  0.000  1.000  1.0  0.  1  0.

SECTION
#Xle   Yle    Zle      Chord   Ainc  Nspanwise  Sspace
 0.00  0.500  0.866  1.0  0.  1  0.

SECTION
#Xle   Yle    Zle      Chord   Ainc  Nspanwise  Sspace
 0.00  0.866  0.500  1.0  0.  1  0.

SECTION
#Xle   Yle    Zle      Chord   Ainc  Nspanwise  Sspace
 0.00  1.000  0.000  1.0  0.  1  0.

SECTION
#Xle   Yle    Zle      Chord   Ainc  Nspanwise  Sspace
 0.00  0.866  -0.500  1.0  0.  1  0.

SECTION
#Xle   Yle    Zle      Chord   Ainc  Nspanwise  Sspace
 0.00  0.500  -0.866  1.0  0.  1  0.

SECTION
#Xle   Yle    Zle      Chord   Ainc  Nspanwise  Sspace
 0.00  0.000  -1.000  1.0  0.  1  0.

SECTION
#Xle   Yle    Zle      Chord   Ainc  Nspanwise  Sspace
 0.00  -0.500  -0.866  1.0  0.  1  0.

SECTION
#Xle   Yle    Zle      Chord   Ainc  Nspanwise  Sspace
 0.00  -0.866  -0.500  1.0  0.  1  0.

SECTION
#Xle   Yle    Zle      Chord   Ainc  Nspanwise  Sspace
 0.00  -1.000  0.000  1.0  0.  1  0.

SECTION
#Xle   Yle    Zle      Chord   Ainc  Nspanwise  Sspace
 0.00  -0.866  0.500  1.0  0.  1  0.

SECTION
#Xle   Yle    Zle      Chord   Ainc  Nspanwise  Sspace
 0.00  -0.500  0.866  1.0  0.  1  0.

SECTION
#Xle   Yle    Zle      Chord   Ainc  Nspanwise  Sspace
 0.00  0.000  1.000  1.0  0.  1  0.
